# OpenSim document version 30000
InverseKinematicsTool:
  results_directory: ./
  constraint_weight: Inf
  accuracy: 1e-8
  report_errors: true
  report_marker_locations: true
  IKTaskSet:
    IKMarkerTask LASI: apply=false weight=0
    IKMarkerTask LASI_posAnt: apply=true weight=100
    IKMarkerTask LASI_medLat: apply=true weight=100
    IKMarkerTask LASI_supInf: apply=true weight=100
    IKMarkerTask RASI: apply=false weight=0
    IKMarkerTask RASI_posAnt: apply=true weight=100
    IKMarkerTask RASI_medLat: apply=true weight=100
    IKMarkerTask RASI_supInf: apply=true weight=100
    IKMarkerTask LPSI: apply=false weight=0
    IKMarkerTask LPSI_posAnt: apply=true weight=100
    IKMarkerTask LPSI_medLat: apply=true weight=100
    IKMarkerTask LPSI_supInf: apply=true weight=100
    IKMarkerTask RPSI: apply=false weight=0
    IKMarkerTask RPSI_posAnt: apply=true weight=100
    IKMarkerTask RPSI_medLat: apply=true weight=100
    IKMarkerTask RPSI_supInf: apply=true weight=100
    IKMarkerTask RTHI: apply=false weight=0
    IKMarkerTask RTHI_posAnt: apply=true weight=100
    IKMarkerTask RTHI_medLat: apply=true weight=100
    IKMarkerTask RTHI_proDis: apply=true weight=100
    IKMarkerTask RKNE: apply=false weight=0
    IKMarkerTask RKNE_posAnt: apply=true weight=100
    IKMarkerTask RKNE_medLat: apply=true weight=100
    IKMarkerTask RKNE_proDis: apply=true weight=100
    IKMarkerTask RTIB: apply=false weight=0
    IKMarkerTask RTIB_posAnt: apply=true weight=100
    IKMarkerTask RTIB_medLat: apply=true weight=100
    IKMarkerTask RTIB_proDis: apply=true weight=100
    IKMarkerTask RANK: apply=false weight=0
    IKMarkerTask RANK_posAnt: apply=true weight=100
    IKMarkerTask RANK_medLat: apply=true weight=100
    IKMarkerTask RANK_proDis: apply=true weight=100
    IKMarkerTask RHEE: apply=false weight=0
    IKMarkerTask RHEE_supInf: apply=true weight=100
    IKMarkerTask RHEE_medLat: apply=true weight=100
    IKMarkerTask RHEE_proDis: apply=true weight=100
    IKMarkerTask RSMH: apply=false weight=0
    IKMarkerTask RSMH_supInf: apply=true weight=100
    IKMarkerTask RSMH_medLat: apply=true weight=100
    IKMarkerTask RSMH_proDis: apply=true weight=100
    IKMarkerTask LTHI: apply=false weight=0
    IKMarkerTask LTHI_posAnt: apply=true weight=100
    IKMarkerTask LTHI_medLat: apply=true weight=100
    IKMarkerTask LTHI_proDis: apply=true weight=100
    IKMarkerTask LKNE: apply=false weight=0
    IKMarkerTask LKNE_posAnt: apply=true weight=100
    IKMarkerTask LKNE_medLat: apply=true weight=100
    IKMarkerTask LKNE_proDis: apply=true weight=100
    IKMarkerTask LTIB: apply=false weight=0
    IKMarkerTask LTIB_posAnt: apply=true weight=100
    IKMarkerTask LTIB_medLat: apply=true weight=100
    IKMarkerTask LTIB_proDis: apply=true weight=100
    IKMarkerTask LANK: apply=false weight=0
    IKMarkerTask LANK_posAnt: apply=true weight=100
    IKMarkerTask LANK_medLat: apply=true weight=100
    IKMarkerTask LANK_proDis: apply=true weight=100
    IKMarkerTask LHEE: apply=false weight=0
    IKMarkerTask LHEE_supInf: apply=true weight=100
    IKMarkerTask LHEE_medLat: apply=true weight=100
    IKMarkerTask LHEE_proDis: apply=true weight=100
    IKMarkerTask LSMH: apply=false weight=0
    IKMarkerTask LSMH_supInf: apply=true weight=100
    IKMarkerTask LSMH_medLat: apply=true weight=100
    IKMarkerTask LSMH_proDis: apply=true weight=100
    IKMarkerTask LTHAP: apply=false weight=0
    IKMarkerTask LTHAP_posAnt: apply=true weight=100
    IKMarkerTask LTHAP_medLat: apply=true weight=100
    IKMarkerTask LTHAP_proDis: apply=true weight=100
    IKMarkerTask LTHAD: apply=false weight=0
    IKMarkerTask LTHAD_posAnt: apply=true weight=100
    IKMarkerTask LTHAD_medLat: apply=true weight=100
    IKMarkerTask LTHAD_proDis: apply=true weight=100
    IKMarkerTask LTIAP: apply=false weight=0
    IKMarkerTask LTIAP_posAnt: apply=true weight=100
    IKMarkerTask LTIAP_medLat: apply=true weight=100
    IKMarkerTask LTIAP_proDis: apply=true weight=100
    IKMarkerTask LTIAD: apply=false weight=0
    IKMarkerTask LTIAD_posAnt: apply=true weight=100
    IKMarkerTask LTIAD_medLat: apply=true weight=100
    IKMarkerTask LTIAD_proDis: apply=true weight=100
    IKMarkerTask RTHAP: apply=false weight=0
    IKMarkerTask RTHAP_posAnt: apply=true weight=100
    IKMarkerTask RTHAP_medLat: apply=true weight=100
    IKMarkerTask RTHAP_proDis: apply=true weight=100
    IKMarkerTask RTHAD: apply=false weight=0
    IKMarkerTask RTHAD_posAnt: apply=true weight=100
    IKMarkerTask RTHAD_medLat: apply=true weight=100
    IKMarkerTask RTHAD_proDis: apply=true weight=100
    IKMarkerTask RTIAP: apply=false weight=0
    IKMarkerTask RTIAP_posAnt: apply=true weight=100
    IKMarkerTask RTIAP_medLat: apply=true weight=100
    IKMarkerTask RTIAP_proDis: apply=true weight=100
    IKMarkerTask RTIAD: apply=false weight=0
    IKMarkerTask RTIAD_posAnt: apply=true weight=100
    IKMarkerTask RTIAD_medLat: apply=true weight=100
    IKMarkerTask RTIAD_proDis: apply=true weight=100
    IKMarkerTask LPAT: apply=false weight=0
    IKMarkerTask LPAT_posAnt: apply=false weight=0
    IKMarkerTask LPAT_medLat: apply=false weight=0
    IKMarkerTask LPAT_proDis: apply=false weight=0
    IKMarkerTask LTHLD: apply=false weight=0
    IKMarkerTask LTHLD_posAnt: apply=false weight=0
    IKMarkerTask LTHLD_medLat: apply=false weight=0
    IKMarkerTask LTHLD_proDis: apply=false weight=0
    IKMarkerTask RPAT: apply=false weight=0
    IKMarkerTask RPAT_posAnt: apply=false weight=0
    IKMarkerTask RPAT_medLat: apply=false weight=0
    IKMarkerTask RPAT_proDis: apply=false weight=0
    IKMarkerTask RTHLD: apply=false weight=0
    IKMarkerTask RTHLD_posAnt: apply=false weight=0
    IKMarkerTask RTHLD_medLat: apply=false weight=0
    IKMarkerTask RTHLD_proDis: apply=false weight=0
    IKMarkerTask RTOE: apply=false weight=0
    IKMarkerTask RTOE_supInf: apply=true weight=100
    IKMarkerTask RTOE_medLat: apply=true weight=100
    IKMarkerTask RTOE_proDis: apply=true weight=100
    IKMarkerTask RFMH: apply=false weight=0
    IKMarkerTask RFMH_supInf: apply=true weight=100
    IKMarkerTask RFMH_medLat: apply=true weight=100
    IKMarkerTask RFMH_proDis: apply=true weight=100
    IKMarkerTask RVMH: apply=false weight=0
    IKMarkerTask RVMH_supInf: apply=true weight=100
    IKMarkerTask RVMH_medLat: apply=true weight=100
    IKMarkerTask RVMH_proDis: apply=true weight=100
    IKMarkerTask LTOE: apply=false weight=0
    IKMarkerTask LTOE_supInf: apply=true weight=100
    IKMarkerTask LTOE_medLat: apply=true weight=100
    IKMarkerTask LTOE_proDis: apply=true weight=100
    IKMarkerTask LFMH: apply=false weight=0
    IKMarkerTask LFMH_supInf: apply=true weight=100
    IKMarkerTask LFMH_medLat: apply=true weight=100
    IKMarkerTask LFMH_proDis: apply=true weight=100
    IKMarkerTask LVMH: apply=false weight=0
    IKMarkerTask LVMH_supInf: apply=true weight=100
    IKMarkerTask LVMH_medLat: apply=true weight=100
    IKMarkerTask LVMH_proDis: apply=true weight=100
