# OpenSim document version 30000
MarkerSet:
  Marker LASI: pelvis (0.0080898 0.0101666 -0.124647)
  Marker LASI_posAnt: pelvis (0.0080898 0.0101666 -0.124647)
  Marker LASI_medLat: pelvis (0.0080898 0.0101666 -0.124647)
  Marker LASI_supInf: pelvis (0.0080898 0.0101666 -0.124647)
  Marker RASI: pelvis (-0.00597153 0.00359413 0.127307)
  Marker RASI_posAnt: pelvis (-0.00597153 0.00359413 0.127307)
  Marker RASI_medLat: pelvis (-0.00597153 0.00359413 0.127307)
  Marker RASI_supInf: pelvis (-0.00597153 0.00359413 0.127307)
  Marker LPSI: pelvis (-0.183608 0.0634621 -0.0680169)
  Marker LPSI_posAnt: pelvis (-0.183608 0.0634621 -0.0680169)
  Marker LPSI_medLat: pelvis (-0.183608 0.0634621 -0.0680169)
  Marker LPSI_supInf: pelvis (-0.183608 0.0634621 -0.0680169)
  Marker RPSI: pelvis (-0.180909 0.0634337 0.0546326)
  Marker RPSI_posAnt: pelvis (-0.180909 0.0634337 0.0546326)
  Marker RPSI_medLat: pelvis (-0.180909 0.0634337 0.0546326)
  Marker RPSI_supInf: pelvis (-0.180909 0.0634337 0.0546326)
  Marker LTHI: femur_l (-0.00399242 -0.20754 -0.0999247)
  Marker LTHI_posAnt: femur_l (-0.00399242 -0.20754 -0.0999247)
  Marker LTHI_medLat: femur_l (-0.00399242 -0.20754 -0.0999247)
  Marker LTHI_proDis: femur_l (-0.00399242 -0.20754 -0.0999247)
  Marker LKNE: femur_l (0 -0.415174 -0.0525)
  Marker LKNE_posAnt: femur_l (0 -0.415174 -0.0525)
  Marker LKNE_medLat: femur_l (0 -0.415174 -0.0525)
  Marker LKNE_proDis: femur_l (0 -0.415174 -0.0525)
  Marker RTHI: femur_r (-1.38556e-16 -0.224945 0.0909677)
  Marker RTHI_posAnt: femur_r (-1.38556e-16 -0.224945 0.0909677)
  Marker RTHI_medLat: femur_r (-1.38556e-16 -0.224945 0.0909677)
  Marker RTHI_proDis: femur_r (-1.38556e-16 -0.224945 0.0909677)
  Marker RKNE: femur_r (3.72529e-9 -0.402651 0.0527368)
  Marker RKNE_posAnt: femur_r (3.72529e-9 -0.402651 0.0527368)
  Marker RKNE_medLat: femur_r (3.72529e-9 -0.402651 0.0527368)
  Marker RKNE_proDis: femur_r (3.72529e-9 -0.402651 0.0527368)
  Marker LTIB: tibia_l (2.39808e-16 -0.1859 -0.0715228)
  Marker LTIB_posAnt: tibia_l (2.39808e-16 -0.1859 -0.0715228)
  Marker LTIB_medLat: tibia_l (2.39808e-16 -0.1859 -0.0715228)
  Marker LTIB_proDis: tibia_l (2.39808e-16 -0.1859 -0.0715228)
  Marker LANK: tibia_l (0 -0.424826 -0.04)
  Marker LANK_posAnt: tibia_l (0 -0.424826 -0.04)
  Marker LANK_medLat: tibia_l (0 -0.424826 -0.04)
  Marker LANK_proDis: tibia_l (0 -0.424826 -0.04)
  Marker RTIB: tibia_r (-1.77636e-17 -0.206151 0.0710892)
  Marker RTIB_posAnt: tibia_r (-1.77636e-17 -0.206151 0.0710892)
  Marker RTIB_medLat: tibia_r (-1.77636e-17 -0.206151 0.0710892)
  Marker RTIB_proDis: tibia_r (-1.77636e-17 -0.206151 0.0710892)
  Marker RANK: tibia_r (-0.00969172 -0.418783 0.0429379)
  Marker RANK_posAnt: tibia_r (-0.00969172 -0.418783 0.0429379)
  Marker RANK_medLat: tibia_r (-0.00969172 -0.418783 0.0429379)
  Marker RANK_proDis: tibia_r (-0.00969172 -0.418783 0.0429379)
  Marker RHEE: calcn_r (-0.0645362 -0.0271254 -0.0145158)
  Marker RHEE_supInf: calcn_r (-0.0645362 -0.0271254 -0.0145158)
  Marker RHEE_medLat: calcn_r (-0.0645362 -0.0271254 -0.0145158)
  Marker RHEE_proDis: calcn_r (-0.0645362 -0.0271254 -0.0145158)
  Marker RSMH: toes_r (0.0817053 0.00652635 0.00423662)
  Marker RSMH_supInf: toes_r (0.0817053 0.00652635 0.00423662)
  Marker RSMH_medLat: toes_r (0.0817053 0.00652635 0.00423662)
  Marker RSMH_proDis: toes_r (0.0817053 0.00652635 0.00423662)
  Marker LHEE: calcn_l (-0.0645362 -0.0271254 -0.0145158)
  Marker LHEE_supInf: calcn_l (-0.0645362 -0.0271254 -0.0145158)
  Marker LHEE_medLat: calcn_l (-0.0645362 -0.0271254 -0.0145158)
  Marker LHEE_proDis: calcn_l (-0.0645362 -0.0271254 -0.0145158)
  Marker LSMH: toes_l (0.0817053 0.00652635 0.00423662)
  Marker LSMH_supInf: toes_l (0.0817053 0.00652635 0.00423662)
  Marker LSMH_medLat: toes_l (0.0817053 0.00652635 0.00423662)
  Marker LSMH_proDis: toes_l (0.0817053 0.00652635 0.00423662)
  # "-----------NEW------------"
  Marker LTHAP: femur_l (0.0510168 -0.135932 -0.0206733)
  Marker LTHAP_posAnt: femur_l (0.0510168 -0.135932 -0.0206733)
  Marker LTHAP_medLat: femur_l (0.0510168 -0.135932 -0.0206733)
  Marker LTHAP_proDis: femur_l (0.0510168 -0.135932 -0.0206733)
  Marker LTHAD: femur_l (0.0575402 -0.282133 -0.012113)
  Marker LTHAD_posAnt: femur_l (0.0575402 -0.282133 -0.012113)
  Marker LTHAD_medLat: femur_l (0.0575402 -0.282133 -0.012113)
  Marker LTHAD_proDis: femur_l (0.0575402 -0.282133 -0.012113)
  Marker RTHAP: femur_r (0.0510168 -0.135932 -0.0206733)
  Marker RTHAP_posAnt: femur_r (0.0510168 -0.135932 -0.0206733)
  Marker RTHAP_medLat: femur_r (0.0510168 -0.135932 -0.0206733)
  Marker RTHAP_proDis: femur_r (0.0510168 -0.135932 -0.0206733)
  Marker RTHAD: femur_r (0.0575402 -0.282133 -0.012113)
  Marker RTHAD_posAnt: femur_r (0.0575402 -0.282133 -0.012113)
  Marker RTHAD_medLat: femur_r (0.0575402 -0.282133 -0.012113)
  Marker RTHAD_proDis: femur_r (0.0575402 -0.282133 -0.012113)
  Marker LTIAP: tibia_l (0.0468274 -0.161181 -0.0112459)
  Marker LTIAP_posAnt: tibia_l (0.0468274 -0.161181 -0.0112459)
  Marker LTIAP_medLat: tibia_l (0.0468274 -0.161181 -0.0112459)
  Marker LTIAP_proDis: tibia_l (0.0468274 -0.161181 -0.0112459)
  Marker LTIAD: tibia_l (0.0356325 -0.307753 0.0153233)
  Marker LTIAD_posAnt: tibia_l (0.0356325 -0.307753 0.0153233)
  Marker LTIAD_medLat: tibia_l (0.0356325 -0.307753 0.0153233)
  Marker LTIAD_proDis: tibia_l (0.0356325 -0.307753 0.0153233)
  Marker RTIAP: tibia_l (0.0468274 -0.161181 -0.0112459)
  Marker RTIAP_posAnt: tibia_r (0.0468274 -0.161181 -0.0112459)
  Marker RTIAP_medLat: tibia_r (0.0468274 -0.161181 -0.0112459)
  Marker RTIAP_proDis: tibia_r (0.0468274 -0.161181 -0.0112459)
  Marker RTIAD: tibia_r (0.0626192 -0.302782 0.0125915)
  Marker RTIAD_posAnt: tibia_r (0.0626192 -0.302782 0.0125915)
  Marker RTIAD_medLat: tibia_r (0.0626192 -0.302782 0.0125915)
  Marker RTIAD_proDis: tibia_r (0.0626192 -0.302782 0.0125915)
  Marker RPAT: femur_r (0.0422081 -0.39479 0.00836546)
  Marker RPAT_posAnt: femur_r (0.0422081 -0.39479 0.00836546)
  Marker RPAT_medLat: femur_r (0.0422081 -0.39479 0.00836546)
  Marker RPAT_proDis: femur_r (0.0422081 -0.39479 0.00836546)
  Marker RTHLD: femur_r (0.0190351 -0.287393 0.0469096)
  Marker RTHLD_posAnt: femur_r (0.0190351 -0.287393 0.0469096)
  Marker RTHLD_medLat: femur_r (0.0190351 -0.287393 0.0469096)
  Marker RTHLD_proDis: femur_r (0.0190351 -0.287393 0.0469096)
  Marker LPAT: femur_l (0.0499838 -0.392918 0.000312091)
  Marker LPAT_posAnt: femur_l (0.0499838 -0.392918 0.000312091)
  Marker LPAT_medLat: femur_l (0.0499838 -0.392918 0.000312091)
  Marker LPAT_proDis: femur_l (0.0499838 -0.392918 0.000312091)
  Marker LTHLD: femur_l (0.012637 -0.287289 -0.0550111)
  Marker LTHLD_posAnt: femur_l (0.012637 -0.287289 -0.0550111)
  Marker LTHLD_medLat: femur_l (0.012637 -0.287289 -0.0550111)
  Marker LTHLD_proDis: femur_l (0.012637 -0.287289 -0.0550111)
  Marker LTOE: calcn_l (0.0817053 0.00652635 0.00423662)
  Marker LTOE_supInf: calcn_l (0.0817053 0.00652635 0.00423662)
  Marker LTOE_medLat: calcn_l (0.0817053 0.00652635 0.00423662)
  Marker LTOE_proDis: calcn_l (0.0817053 0.00652635 0.00423662)
  Marker LFMH: toes_l (-0.00492577 0.00216376 0.0470056)
  Marker LFMH_supInf: toes_l (-0.00492577 0.00216376 0.0470056)
  Marker LFMH_medLat: toes_l (-0.00492577 0.00216376 0.0470056)
  Marker LFMH_proDis: toes_l (-0.00492577 0.00216376 0.0470056)
  Marker LVMH: toes_l (-0.016706 0.00973708 -0.0569778)
  Marker LVMH_supInf: toes_l (-0.016706 0.00973708 -0.0569778)
  Marker LVMH_medLat: toes_l (-0.016706 0.00973708 -0.0569778)
  Marker LVMH_proDis: toes_l (-0.016706 0.00973708 -0.0569778)
  Marker RTOE: calcn_r (0.0817053 0.00652635 0.00423662)
  Marker RTOE_supInf: calcn_r (0.0817053 0.00652635 0.00423662)
  Marker RTOE_medLat: calcn_r (0.0817053 0.00652635 0.00423662)
  Marker RTOE_proDis: calcn_r (0.0817053 0.00652635 0.00423662)
  Marker RFMH: toes_r (0.00465547 0.00432085 -0.0457093)
  Marker RFMH_supInf: toes_r (0.00465547 0.00432085 -0.0457093)
  Marker RFMH_medLat: toes_r (0.00465547 0.00432085 -0.0457093)
  Marker RFMH_proDis: toes_r (0.00465547 0.00432085 -0.0457093)
  Marker RVMH: toes_r (-0.006375 -0.00323313 0.0657584)
  Marker RVMH_supInf: toes_r (-0.006375 -0.00323313 0.0657584)
  Marker RVMH_medLat: toes_r (-0.006375 -0.00323313 0.0657584)
  Marker RVMH_proDis: toes_r (-0.006375 -0.00323313 0.0657584)
